$SIZES SD=20
$PROBLEM base model
$INPUT ID DV TIME
$DATA file.csv IGNORE=@

$PRED
Y = THETA(1) + ETA(1) + ERR(1)

$THETA 0.1
$OMEGA 0.01
$SIGMA 1
$ESTIMATION METHOD=1 INTER MAXEVALS=9990 PRINT=2 POSTHOC
